<?xml version="1.0"?>
<?xml-stylesheet type="text/xsl" href="http://jsbsim.sourceforge.net/JSBSim.xsl"?>

<!--
##############################################
# Copyright (c) Joshua Davidson (it0uchpods) #
##############################################
-->

<fdm_config name="IDG-A33X" version="2.0" release="BETA"
xmlns:xsi="http://www.w3.org/2001/XMLSchema-instance"
xsi:noNamespaceSchemaLocation="http://jsbsim.sourceforge.net/JSBSim.xsd">

	<fileheader>
		<author>Joshua Davidson (it0uchpods)</author>
		<version>Pre V1.0</version>
		<description>A33X FDE</description>
	</fileheader>

	<metrics file="Systems/a332-metrics"/>
	<mass_balance file="Systems/a332-mass-balance"/>
	<ground_reactions file="Systems/a332-ground-reactions"/>

	<propulsion>
		<engine file="trent772b-60_1">
			<location unit="M">
				<x> -2.7034 </x>
				<y> -9.40138 </y>
				<z> -1.89664 </z>
			</location>
			<orient unit="DEG">
				<roll> 0.0 </roll>
				<pitch> 2.2 </pitch>
				<yaw> 1 </yaw>
			</orient>
			<feed>3</feed>
			<thruster file="direct">
				<location unit="M">
					<x> -2.7034 </x>
					<y> -9.40138 </y>
					<z> -1.89664 </z>
				</location>
				<orient unit="DEG">
					<roll> 0.0 </roll>
					<pitch> 2.2 </pitch>
					<yaw> 1 </yaw>
				</orient>
			</thruster>
		</engine>

		<engine file="trent772b-60_2">
			<location unit="M">
				<x> -2.7034 </x>
				<y> 9.40138 </y>
				<z> -1.89664 </z>
			</location>
			<orient unit="DEG">
				<roll> 0.0 </roll>
				<pitch> 2.2 </pitch>
				<yaw> -1 </yaw>
			</orient>
			<feed>4</feed>
			<thruster file="direct">
				<location unit="M">
					<x> -2.7034 </x>
					<y> 9.40138 </y>
					<z> -1.89664 </z>
				</location>
				<orient unit="DEG">
					<roll> 0.0 </roll>
					<pitch> 2.2 </pitch>
					<yaw> -1 </yaw>
				</orient>
			</thruster>
		</engine>

		<tank type="FUEL">    <!-- Left Wing Tank -->
			<location unit="M">
				<x> 0.80086 </x>
				<y> 0 </y>
				<z> 0.25204 </z>
			</location>
			<capacity unit="LBS"> 67803 </capacity>
			<contents unit="LBS"> 15000 </contents>
			<standpipe unit="LBS">31</standpipe><!-- minimun fuel on pipes -->
			<priority>1</priority>
			<type>JET-A1</type>
			<temperature>50</temperature>
		</tank>
		<tank type="FUEL">    <!-- Center Tank -->
			<location unit="M">
				<x> 0.83086 </x>
				<y> 0 </y>
				<z> 0.25204 </z>
			</location>
			<capacity unit="LBS"> 60925 </capacity>
			<contents unit="LBS"> 0 </contents>
			<standpipe unit="LBS">43</standpipe><!-- minimun fuel on pipes -->
			<priority>1</priority>
			<type>JET-A1</type>
			<temperature>50</temperature>
		</tank>
		<tank type="FUEL">    <!-- Right Wing Tank -->
			<location unit="M">
				<x> 0.80086 </x>
				<y> 0 </y>
				<z> 0.25204 </z>
			</location>
			<capacity unit="LBS"> 67803 </capacity>
			<contents unit="LBS"> 15000 </contents>
			<standpipe unit="LBS">31</standpipe><!-- minimun fuel on pipes -->
			<priority>1</priority>
			<type>JET-A1</type>
			<temperature>50</temperature>
		</tank>
		<tank type="FUEL">    <!-- Engine 1 Pipes -->
			<location unit="M">
				<x> 0.48086 </x>
				<y> 0 </y>
				<z> 0.25204 </z>
			</location>
			<capacity unit="LBS">10</capacity>
			<contents unit="LBS">0</contents>
			<priority>1</priority>
			<type>JET-A1</type>
		</tank>
		<tank type="FUEL">    <!-- Engine 2 Pipes -->
			<location unit="M">
				<x> 0.48086 </x>
				<y> 0 </y>
				<z> 0.25204 </z>
			</location>
			<capacity unit="LBS">10</capacity>
			<contents unit="LBS">0</contents>
			<priority>1</priority>
			<type>JET-A1</type>
		</tank>
	</propulsion>

	<system file="pushback"/>
	<system file="fuel"/>
	<system file="glass-effect1"/>
	<system file="a332-fcs"/>
	<system file="a330-spoiler"/>

	<flight_control name="none"/>

	<aerodynamics file="Systems/a332-aerodynamics.xml"/>
	<external_reactions file="Systems/a332-external-reactions"/>

</fdm_config>
