<?xml version="1.0"?>
<?xml-stylesheet type="text/xsl" href="http://jsbsim.sourceforge.net/JSBSim.xsl"?>

<!--
##############################################
# Copyright (c) Joshua Davidson (it0uchpods) #
##############################################
-->

<fdm_config name="IDG-A33X" version="2.0" release="BETA"
xmlns:xsi="http://www.w3.org/2001/XMLSchema-instance"
xsi:noNamespaceSchemaLocation="http://jsbsim.sourceforge.net/JSBSim.xsd">

	<fileheader>
		<author>Joshua Davidson (it0uchpods)</author>
		<version>Pre V1.0</version>
		<description>A33X FDE</description>
	</fileheader>

	<metrics>
		<wingarea  unit="FT2"> 3892.00 </wingarea>
		<wingspan  unit="FT" >  197.83 </wingspan>
		<wing_incidence      >    1.03 </wing_incidence>
		<chord     unit="FT" >   31.03 </chord>
		<htailarea unit="FT2">  222.16 </htailarea>
		<htailarm  unit="FT" >  107.29 </htailarm>
		<vtailarea unit="FT2">  496.25 </vtailarea>
		<vtailarm  unit="FT" >  107.19 </vtailarm>

		<location name="AERORP" unit="M">
			<x> 1.48086 </x>
			<y> 0 </y>
			<z> 0.25204 </z>
		</location>

		<location name="EYEPOINT" unit="M">
			<x> 0 </x>
			<y> 0 </y>
			<z> 0 </z>
		</location>

		<location name="VRP" unit="M">
			<x> 0 </x>
			<y> 0 </y>
			<z> 0 </z>
		</location>
	</metrics>

	<mass_balance>
		<ixx unit="SLUG*FT2"> 5175399 </ixx>
		<iyy unit="SLUG*FT2"> 7004014 </iyy>
		<izz unit="SLUG*FT2"> 6408984 </izz>

		<ixy unit="SLUG*FT2">       0 </ixy>
		<ixz unit="SLUG*FT2">       0 </ixz>
		<iyz unit="SLUG*FT2">       0 </iyz>
		<emptywt unit="LBS" >  214000 </emptywt>

		<location name="CG" unit="M">
			<x> 0.48086 </x>
			<y> 0 </y>
			<z> 0.25204 </z>
		</location>

		<pointmass name="Crew">
			<weight unit="LBS">380</weight>
			<location name="POINTMASS" unit="M">
				<x> -20.1707 </x>
				<y> 0 </y>
				<z> 0.1561 </z>
			</location>
		</pointmass>

		<pointmass name="PAX">
			<weight unit="LBS">39000</weight>
			<location name="POINTMASS" unit="M">
				<x> 0.48086 </x>
				<y> 0 </y>
				<z> 0.25204 </z>
			</location>
		</pointmass>

		<pointmass name="Fwd Cargo">
			<weight unit="LBS">3000</weight>
			<location name="POINTMASS" unit="M">
				<x> -6.08922 </x>
				<y> 0 </y>
				<z> -1.02745 </z>
			</location>
		</pointmass>

		<pointmass name="Aft Cargo">
			<weight unit="LBS">3000</weight>
			<location name="POINTMASS" unit="M">
				<x> 12.5936 </x>
				<y> 0 </y>
				<z> -1.02745 </z>
			</location>
		</pointmass>

		<pointmass name="Rear Bulk Cargo">
			<weight unit="LBS">6500</weight>
			<location name="POINTMASS" unit="M">
				<x> 15.253 </x>
				<y> 0 </y>
				<z> -1.02745 </z>
			</location>
		</pointmass>
	</mass_balance>

	<ground_reactions>
		<contact type="BOGEY" name="NOSE_LG">
			<location unit="M">
				<x> -15.9664 </x>
				<y> 0 </y>
				<z> -5.43654 </z>
			</location>
			<static_friction> 0.4 </static_friction>
			<dynamic_friction> 0.6 </dynamic_friction>
			<rolling_friction> 0.02 </rolling_friction>
			<spring_coeff unit="LBS/FT"> 29935.5 </spring_coeff>
			<damping_coeff unit="LBS/FT/SEC"> 19978.5 </damping_coeff>
			<max_steer unit="DEG"> 70 </max_steer>
			<brake_group> NONE </brake_group>
			<retractable>1</retractable>
		</contact>
		<contact type="BOGEY" name="LEFT_MLG">
			<location unit="M">
				<x> 5.83421 </x>
				<y> -5.03322 </y>
				<z> -5.5614 </z>
			</location>
			<static_friction> 0.4 </static_friction>
			<dynamic_friction> 0.6 </dynamic_friction>
			<rolling_friction> 0.02 </rolling_friction>
			<spring_coeff unit="LBS/FT"> 68785 </spring_coeff>
			<damping_coeff unit="LBS/FT/SEC"> 26957 </damping_coeff>
			<max_steer unit="DEG"> 0.0 </max_steer>
			<brake_group> LEFT </brake_group>
			<retractable>1</retractable>
		</contact>
		<contact type="BOGEY" name="RIGHT_MLG">
			<location unit="M">
				<x> 5.83421 </x>
				<y> 5.03322 </y>
				<z> -5.5614 </z>
			</location>
			<static_friction> 0.4 </static_friction>
			<dynamic_friction> 0.6 </dynamic_friction>
			<rolling_friction> 0.02 </rolling_friction>
			<spring_coeff unit="LBS/FT"> 68785 </spring_coeff>
			<damping_coeff unit="LBS/FT/SEC"> 26957 </damping_coeff>
			<max_steer unit="DEG"> 0.0 </max_steer>
			<brake_group> RIGHT </brake_group>
			<retractable>1</retractable>
		</contact>

		<contact type="STRUCTURE" name="NOSE_1">
			<location unit="M">
				<x> -22.4361 </x>
				<y> 0 </y>
				<z> -0.60712 </z>
			</location>
			<static_friction> 1.0 </static_friction>
			<dynamic_friction> 0.4 </dynamic_friction>
			<rolling_friction> 0.4 </rolling_friction>
			<spring_coeff unit="LBS/FT"> 50000 </spring_coeff>
			<damping_coeff unit="LBS/FT/SEC"> 50000 </damping_coeff>
			<max_steer unit="DEG"> 0.0 </max_steer>
			<brake_group> NONE </brake_group>
			<retractable>0</retractable>
		</contact>
		<contact type="STRUCTURE" name="NOSE_2">
			<location unit="M">
				<x> -19.7066 </x>
				<y> 0 </y>
				<z> 2.31652 </z>
			</location>
			<static_friction> 1.0 </static_friction>
			<dynamic_friction> 0.4 </dynamic_friction>
			<rolling_friction> 0.4 </rolling_friction>
			<spring_coeff unit="LBS/FT"> 50000 </spring_coeff>
			<damping_coeff unit="LBS/FT/SEC"> 50000 </damping_coeff>
			<max_steer unit="DEG"> 0.0 </max_steer>
			<brake_group> NONE </brake_group>
			<retractable>0</retractable>
		</contact>

		<contact type="STRUCTURE" name="BOTTOM_1">
			<location unit="M">
				<x> -14.8914 </x>
				<y> 0 </y>
				<z> -2.63783 </z>
			</location>
			<static_friction> 1.0 </static_friction>
			<dynamic_friction> 0.4 </dynamic_friction>
			<rolling_friction> 0.4 </rolling_friction>
			<spring_coeff unit="LBS/FT"> 50000 </spring_coeff>
			<damping_coeff unit="LBS/FT/SEC"> 50000 </damping_coeff>
			<max_steer unit="DEG"> 0.0 </max_steer>
			<brake_group> NONE </brake_group>
			<retractable>0</retractable>
		</contact>
		<contact type="STRUCTURE" name="BOTTOM_2">
			<location unit="M">
				<x> 17.5787 </x>
				<y> 0 </y>
				<z> -2.50113 </z>
			</location>
			<static_friction> 1.0 </static_friction>
			<dynamic_friction> 0.4 </dynamic_friction>
			<rolling_friction> 0.4 </rolling_friction>
			<spring_coeff unit="LBS/FT"> 50000 </spring_coeff>
			<damping_coeff unit="LBS/FT/SEC"> 50000 </damping_coeff>
			<max_steer unit="DEG"> 0.0 </max_steer>
			<brake_group> NONE </brake_group>
			<retractable>0</retractable>
		</contact>

		<contact type="STRUCTURE" name="TOP_1">
			<location unit="M">
				<x> -14.8914 </x>
				<y> 0 </y>
				<z> 3.14194 </z>
			</location>
			<static_friction> 1.0 </static_friction>
			<dynamic_friction> 0.4 </dynamic_friction>
			<rolling_friction> 0.4 </rolling_friction>
			<spring_coeff unit="LBS/FT"> 50000 </spring_coeff>
			<damping_coeff unit="LBS/FT/SEC"> 50000 </damping_coeff>
			<max_steer unit="DEG"> 0.0 </max_steer>
			<brake_group> NONE </brake_group>
			<retractable>0</retractable>
		</contact>
		<contact type="STRUCTURE" name="TOP_2">
			<location unit="M">
				<x> 21.9234 </x>
				<y> 0 </y>
				<z> 3.18014 </z>
			</location>
			<static_friction> 1.0 </static_friction>
			<dynamic_friction> 0.4 </dynamic_friction>
			<rolling_friction> 0.4 </rolling_friction>
			<spring_coeff unit="LBS/FT"> 50000 </spring_coeff>
			<damping_coeff unit="LBS/FT/SEC"> 50000 </damping_coeff>
			<max_steer unit="DEG"> 0.0 </max_steer>
			<brake_group> NONE </brake_group>
			<retractable>0</retractable>
		</contact>

		<contact type="STRUCTURE" name="ENG_1">
			<location unit="M">
				<x> -2.19181 </x>
				<y> -9.58147 </y>
				<z> -4.25522 </z>
			</location>
			<static_friction> 1.0 </static_friction>
			<dynamic_friction> 0.4 </dynamic_friction>
			<rolling_friction> 0.4 </rolling_friction>
			<spring_coeff unit="LBS/FT"> 50000 </spring_coeff>
			<damping_coeff unit="LBS/FT/SEC"> 50000 </damping_coeff>
			<max_steer unit="DEG"> 0.0 </max_steer>
			<brake_group> NONE </brake_group>
			<retractable>0</retractable>
		</contact>
		<contact type="STRUCTURE" name="ENG_2">
			<location unit="M">
				<x> -2.19181 </x>
				<y> 9.58147 </y>
				<z> -4.25522 </z>
			</location>
			<static_friction> 1.0 </static_friction>
			<dynamic_friction> 0.4 </dynamic_friction>
			<rolling_friction> 0.4 </rolling_friction>
			<spring_coeff unit="LBS/FT"> 50000 </spring_coeff>
			<damping_coeff unit="LBS/FT/SEC"> 50000 </damping_coeff>
			<max_steer unit="DEG"> 0.0 </max_steer>
			<brake_group> NONE </brake_group>
			<retractable>0</retractable>
		</contact>

		<contact type="STRUCTURE" name="TAIL_1">
			<location unit="M">
				<x> 34.2725 </x>
				<y> 0 </y>
				<z> 2.1495 </z>
			</location>
			<static_friction> 1.0 </static_friction>
			<dynamic_friction> 0.4 </dynamic_friction>
			<rolling_friction> 0.4 </rolling_friction>
			<spring_coeff unit="LBS/FT"> 50000 </spring_coeff>
			<damping_coeff unit="LBS/FT/SEC"> 50000 </damping_coeff>
			<max_steer unit="DEG"> 0.0 </max_steer>
			<brake_group> NONE </brake_group>
			<retractable>0</retractable>
		</contact>
		<contact type="STRUCTURE" name="TAIL_2">
			<location unit="M">
				<x> 34.348 </x>
				<y> 0 </y>
				<z> 11.8447 </z>
			</location>
			<static_friction> 1.0 </static_friction>
			<dynamic_friction> 0.4 </dynamic_friction>
			<rolling_friction> 0.4 </rolling_friction>
			<spring_coeff unit="LBS/FT"> 50000 </spring_coeff>
			<damping_coeff unit="LBS/FT/SEC"> 50000 </damping_coeff>
			<max_steer unit="DEG"> 0.0 </max_steer>
			<brake_group> NONE </brake_group>
			<retractable>0</retractable>
		</contact>

		<contact type="STRUCTURE" name="WING_TIP_1">
			<location unit="M">
				<x> 14.1488 </x>
				<y> -29.0681 </y>
				<z> 1.00025 </z>
			</location>
			<static_friction> 1.0 </static_friction>
			<dynamic_friction> 0.4 </dynamic_friction>
			<rolling_friction> 0.4 </rolling_friction>
			<spring_coeff unit="LBS/FT"> 50000 </spring_coeff>
			<damping_coeff unit="LBS/FT/SEC"> 50000 </damping_coeff>
			<max_steer unit="DEG"> 0.0 </max_steer>
			<brake_group> NONE </brake_group>
			<retractable>0</retractable>
		</contact>
		<contact type="STRUCTURE" name="WING_TIP_2">
			<location unit="M">
				<x> 14.1488 </x>
				<y> 29.0681 </y>
				<z> 1.00025 </z>
			</location>
			<static_friction> 1.0 </static_friction>
			<dynamic_friction> 1 </dynamic_friction>
			<rolling_friction> 1 </rolling_friction>
			<spring_coeff unit="LBS/FT"> 50000 </spring_coeff>
			<damping_coeff unit="LBS/FT/SEC"> 50000 </damping_coeff>
			<max_steer unit="DEG"> 0.0 </max_steer>
			<brake_group> NONE </brake_group>
			<retractable>0</retractable>
		</contact>
	</ground_reactions>

	<propulsion>
		<engine file="trent772c-60">
			<location unit="M">
				<x> -2.7034 </x>
				<y> -9.40138 </y>
				<z> -1.89664 </z>
			</location>
			<orient unit="DEG">
				<roll> 0.0 </roll>
				<pitch> 2.2 </pitch>
				<yaw> 1 </yaw>
			</orient>
			<feed>3</feed>
			<thruster file="direct">
				<location unit="M">
					<x> -2.7034 </x>
					<y> -9.40138 </y>
					<z> -1.89664 </z>
				</location>
				<orient unit="DEG">
					<roll> 0.0 </roll>
					<pitch> 2.2 </pitch>
					<yaw> 1 </yaw>
				</orient>
			</thruster>
		</engine>

		<engine file="trent772c-60">
			<location unit="M">
				<x> -2.7034 </x>
				<y> 9.40138 </y>
				<z> -1.89664 </z>
			</location>
			<orient unit="DEG">
				<roll> 0.0 </roll>
				<pitch> 2.2 </pitch>
				<yaw> -1 </yaw>
			</orient>
			<feed>4</feed>
			<thruster file="direct">
				<location unit="M">
					<x> -2.7034 </x>
					<y> 9.40138 </y>
					<z> -1.89664 </z>
				</location>
				<orient unit="DEG">
					<roll> 0.0 </roll>
					<pitch> 2.2 </pitch>
					<yaw> -1 </yaw>
				</orient>
			</thruster>
		</engine>

		<tank type="FUEL">    <!-- Left Wing Tank -->
			<location unit="M">
				<x> 0.80086 </x>
				<y> 0 </y>
				<z> 0.25204 </z>
			</location>
			<capacity unit="LBS"> 67803 </capacity>
			<contents unit="LBS"> 15000 </contents>
			<standpipe unit="LBS">31</standpipe><!-- minimun fuel on pipes -->
			<priority>1</priority>
			<type>JET-A1</type>
			<temperature>50</temperature>
		</tank>
		<tank type="FUEL">    <!-- Center Tank -->
			<location unit="M">
				<x> 0.83086 </x>
				<y> 0 </y>
				<z> 0.25204 </z>
			</location>
			<capacity unit="LBS"> 60925 </capacity>
			<contents unit="LBS"> 0 </contents>
			<standpipe unit="LBS">43</standpipe><!-- minimun fuel on pipes -->
			<priority>1</priority>
			<type>JET-A1</type>
			<temperature>50</temperature>
		</tank>
		<tank type="FUEL">    <!-- Right Wing Tank -->
			<location unit="M">
				<x> 0.80086 </x>
				<y> 0 </y>
				<z> 0.25204 </z>
			</location>
			<capacity unit="LBS"> 67803 </capacity>
			<contents unit="LBS"> 15000 </contents>
			<standpipe unit="LBS">31</standpipe><!-- minimun fuel on pipes -->
			<priority>1</priority>
			<type>JET-A1</type>
			<temperature>50</temperature>
		</tank>
		<tank type="FUEL">    <!-- Engine 1 Pipes -->
			<location unit="M">
				<x> 0.48086 </x>
				<y> 0 </y>
				<z> 0.25204 </z>
			</location>
			<capacity unit="LBS">10</capacity>
			<contents unit="LBS">0</contents>
			<priority>1</priority>
			<type>JET-A1</type>
		</tank>
		<tank type="FUEL">    <!-- Engine 2 Pipes -->
			<location unit="M">
				<x> 0.48086 </x>
				<y> 0 </y>
				<z> 0.25204 </z>
			</location>
			<capacity unit="LBS">10</capacity>
			<contents unit="LBS">0</contents>
			<priority>1</priority>
			<type>JET-A1</type>
		</tank>
	</propulsion>

	<system file="pushback" />
	<system file="fuel" />
	<system file="electrical" />
	<system file="glass-effect1" />
	<system file="fmgc" />
	<system file="a332-fcs" />

	<flight_control name="none"/>

	<aerodynamics file="Systems/a332-aerodynamics.xml" />

	<external_reactions>
		<force name="pushback" frame="BODY">
			<location unit="M">
				<x> -15.9664 </x>
				<y> 0 </y>
				<z> -5.43654 </z>
			</location>
			<direction>
				<x> 1 </x>
				<y> 0 </y>
				<z> 0 </z>
			</direction>
		</force>
	</external_reactions>
</fdm_config>
